# Arquivo de configuração estática para a simulação de rede de molas

# --- Inicialização e Estilo ---
# Define as unidades a serem usadas na simulação (Lennard-Jones)
# Define a dimensionalidade e as condições de contorno (periódico em x, encolhível em y)
units           lj
dimension       2
boundary        p s p

# --- Estilos de Interação ---
# Define o estilo dos átomos como 'bond' (topologia de ligações)
# Define o estilo das ligações como harmônicas (molas)
# Desativa interações de pares de não-ligados (van der Waals)
atom_style      bond
bond_style      harmonic
pair_style      none

# --- Leitura da Geometria ---
# Lê a estrutura da rede a partir de um arquivo de dados.
# A variável ${data_file} é definida pelo código C++ que chama este script.
read_data       ${data_file}

# --- Definição de Grupos ---
# Separa os átomos em grupos para aplicar diferentes condições
group           bottom_atoms type 2  # Fundo fixo
group           top_atoms    type 3  # Topo a ser puxado
group           mobile_atoms type 1  # Átomos móveis no meio

# --- Condições Iniciais (Fixes) ---
# Impede que os átomos da base se movam
fix             1 bottom_atoms setforce 0.0 0.0 0.0

# --- Configuração de Saída ---
# Define a frequência e o estilo da saída de dados termodinâmicos
thermo          1
thermo_style    custom step pe press pyy
